// COMSOL Multiphysics 5.4.0.388 model "Pt_secm_Bruker_np.mph"
// Outline of the model tree

Parameters
  a = 25 [nm]
  Asurf = 4*pi*(Rsurf^2)  // substrate electrode area
  Atip = pi*(Rbase+a)*sqrt((Rbase-a)^2+(K-a)^2) +2*pi*a^2  // tip surface area
  c_bulk = 1 [mmol/L]  // bulk concentration
  c_elec = 0.1 [mol/L]  // electrolyte concentration
  cs = 10[mM]
  D = 8.4*10^-6 [cm^2/s]
  D1 = 8.4*10^-6 [cm^2/s]  // Diffusion Constant
  D2 = 8.4*10^-6 [cm^2/s]
  D3 = 8.4*10^-6 [cm^2/s]
  D4 = 2*10^-6 [cm^2/s]  // Electrolyte Diffusion Constant
  D5 = 2*10^-6 [cm^2/s]
  E_sub = 0.2 [V]  // Substrate applied potential
  E_tip = -0.2 [V]  // tip applied potential
  Eb = 0.1 [V]
  ec = 1.6e-19 [C]
  ep0 = 8.85E-12[F/m]
  epr = 80
  F = 96485 [C/mol]  // Faraday's Constant
  gamma = Rgas*Te/(Na*ec)  // unit conversion for "Phi"
  htins = 50*Rbase  // tip insulator height
  htmesh = 75[nm]  // mesh hole depth
  htsep = 3.27 [um]  // standard cantilever substrate separation
  K = 215 [nm]  // tip height
  kappa = (epr*ep0*kb*Te/(2*Na*ec^2*c_elec))^(1/2)
  kb = Rgas/Na
  ksub = 10^-8 [m^3/s]/(Asurf*Rtip^2)
  ktip = 10^-8 [(m^3/s)]/(Atip*Rtip^2)
  L = 150[nm]  // Cantilever substrate separation
  Na = 6.022e23[1/mol]
  ne = 20  // number of surface charges
  Rbase = (175/2) [nm]  // tip base radius
  Rcant = 50 [um]  // Cantilever half width
  RG = 0.39 [um]  // tip insulation radius
  Rgas = 8.314 [J/(mol*K)]  // Ideal Gas Constant
  Rsurf = 75 [nm]  // enzyme radius
  Rtip = 25 [nm]  // tip radius
  Te = 298 [K]  // Temperature
  te = 15.7/(pi*Rnp*(3*Rnp))
  u1 = z1*F*D1/(Rgas*Te)
  u2 = z2*F*D2/(Rgas*Te)
  u3 = z3*F*D3/(Rgas*Te)
  u4 = z4*F*D4/(Rgas*Te)
  va = ec/(4*pi*ep0*Rtip)/gamma
  Vavg = ec/(4*pi*ep0)*(log(10/6)-log(0.1))/(10/6)
  Xa = 0[nm]  // tip x position
  Ya = 0 [nm]  // tip y position
  z1 = 0  // Glucose
  z2 = -2  // G6P
  z3 = -2  // Gluconolactone
  z4 = +1  // K+ electrolyte
  z5 = -1  // Cl- electrolyte
  k1 = 10[1/nm^2/s]/Na
  k2 = 1E12[nm/s]
  kads = 1E14[nm/s]
  Ka = 1000[nm]
  Rnp = 50 [nm]
  d = 5
  Da = k2*Rnp/D2
  k0 = 5e1 [cm/s]
  kfore = k0*exp(-alpha*n*f*(Etab))
  alpha = 0.5
  f = F/(Rgas*Te)
  Etaf = Ef-E0
  E0 = 0.297 [V]  // formal potential vs. RHE
  Ef = 0.5 [V]
  kback = k0*exp((1-alpha)*n*f*(Etaf))
  n = 1  // number of electrons
  Etab = Eb-E0
  kHOPG = k0H*exp(-alpha*n*f*(Etab))
  k0H = 0 [cm/s]
  H = (K)/Rbase

Geometry
  geom1 "Geometry 1" (3D, length unit nm)
    sph2: Sphere | r = Rnp
    wp1: WorkPlane | unite = on
      r1: Rectangle | base = center; size = {Rnp*40, Rnp*40}
      cro1: CrossSection
      c1: Circle | r = Rnp*10
    wp2: WorkPlane | quickz = L+a+K+htins; unite = on
      c1: Circle | pos = {Xa, Ya}; r = a*10
    ext1: Extrude | workplane = wp2; input = wp2; distance = -htins-a
    cone1: Cone | pos = {Xa, Ya, L+a}; r = a; h = K-a; specifytop = radius; rtop = Rbase
    sph4: Sphere | pos = {Xa, Ya, L+a}; r = a
    blk1: Block | pos = {0, 0, (L+K+htins)/2}; base = center; size = {Rbase*100, Rbase*100, L+K+htins}
    pc1: ParametricCurve | parmin = 1/12*pi; parmax = 11/12*pi; coord = {cos(s)*(Rnp+Rtip+25), 0, sin(s)*(Rnp+Rtip+25)}
    fin: Finalize "Form Union"

Physics
  tds: DilutedSpecies "Transport of Diluted Species" on domains 1
    dependent variable cR = {cR, cP, cK, cCl}
    TransportMechanism.Convection = 0
    TransportMechanism.Migration = 1
    MassConsistentStabilization.glim_mass = (0.1[mol/m^3])/tds.helem
    AdvancedSettings.BackCompState = 0
    cdm1: ConvectionDiffusionMigration "Transport Properties 1" (default)
      z = {z1, z3, z4, z5}
      D_cR = D1
      D_cP = D3
      D_cK = D4
      D_cCl = D5
    nflx1: NoFlux (default) | IncludeConvection = 1
    init1: init "Initial Values 1" (default) | initc = {1*c_bulk, 0*c_bulk, c_elec, c_elec}
    fl1: Fluxes "Flux NP" on boundaries 19, 22, 32, 36
      species = {1, 1, 0, 0}
      N0 = {-kfore*cR, kfore*cR, 0, 0}
      kc = {-k1/c_bulk, 0, 0, 0}
      cb = {cR, 0, 0, 0}
    conc1: Concentration on boundaries 1, 2, 4, 5, 42 | species = {1, 1, 1, 1}; c0 = {1*c_bulk, 0*c_bulk, c_elec, c_elec}
    fl3: Fluxes "Flux Tip" on boundaries 15, 16, 23, 26, 30, 33, 37, 39
      species = {1, 1, 0, 0}
      N0 = {kback*cP, -kback*cP, 0, 0}
      kc = {kback, k2, 0, 0}
      cb = {cP, cP, 0, 0}
    fl4: Fluxes "Flux HOPG" (disabled) on boundaries 7
      species = {1, 1, 0, 0}
      N0 = {-kHOPG*cR, kHOPG*cR, 0, 0}
      kc = {-k1/c_bulk, 0, 0, 0}
      cb = {cR, 0, 0, 0}
  es: Electrostatics on domains 1
    dependent variable V
    ccn1: ChargeConservation (default) | epsilonr_mat = userdef; epsilonr = epr; materialType = solid
    zc1: ZeroCharge (default)
    init1: init "Initial Values 1" (default)
    scd1: SpaceChargeDensity on domains 1 | rhoq = -1/(kappa^2)*ep0*epr*V
    pot1: ElectricPotential on boundaries 1, 2, 4, 5, 8, 9, 11, 12, 18, 20, 21, 28, 29, 31, 35, 40-42
    pot2: ElectricPotential (disabled) on boundaries 15, 16, 23, 26, 30, 33, 37, 39 | V0 = Ef
    pot3: ElectricPotential (disabled) on boundaries 19, 22, 32, 36 | V0 = Eb

Multiphysics
  scdc1: SpaceChargeDensityCoupling (disabled) on domains 1
    SpaceChargeDensitySource_physics = tds
    SpaceChargeDensityDestination_physics = es
  pc1: PotentialCoupling on domains 1 | PotentialSource_physics = es; PotentialDestination_physics = tds

Mesh
  mesh1 "Mesh 1"
    size: MeshSizeDefault | hauto = 4
    ftet1: FreeTet "Free Tetrahedral 1" on domains 1
      dis1: Distribution on edges 23-26, 28-31, 33, 40, 41, 43-45, 47, 50-53, 56-59, 66 | numelem = 25

Studies
  std2 "Study 2"
    param: Parametric "Parametric Sweep" (disabled) | sweeptype = filled; pname = ne; plistarr = 0,20,40,100,200
    stat: Stationary | discretization = {tds, physics, es, physics}
  std3 "L = 50"
    param1: Parametric "L = 50" | pname = {Xa, L}; plistarr = {0, 50*Rbase}; punit = {m, nm}
    stat: Stationary | discretization = {tds, physics, es, physics}
  std4 "L = 50 nm"
    param: Parametric "Parametric Sweep"
      pname = {Xa, L}
      plistarr = {"0.0,4.08,8.16,12.24,16.33,20.41,24.49,28.57,32.65,36.73,40.82,44.9,48.98,53.06,57.14,61.22,65.31,69.39,73.47,77.55,81.63,85.71,89.8,93.88,97.96,102.04,106.12,110.2,114.29,118.37,122.45,126.53,130.61,134.69,138.78,142.86,146.94,151.02,155.1,159.18,163.27,167.35,171.43,175.51,179.59,183.67,187.76,191.84,195.92,200.0", "100.0,99.8889417738,99.554774495,98.9944754694565,98.2006222651,97.1694665354,95.888926497726,94.345188009,92.520200681,90.3904205522491,87.9184201963,85.0748699541,81.7975316365,78.0060034336,73.5800411692,68.3256459847975,61.8728070534,53.4609890903,50.0,50.0,50.0,50.0,50.0,50.0,50.0,50.0,50.0,50.0,50.0,50.0,50.0,50.0,50.0,50.0,50.0,50.0,50.0,50.0,50.0,50.0,50.0,50.0,50.0,50.0,50.0,50.0,50.0,50.0,50.0,50.0"}
      punit = {nm, nm}
    stat: Stationary | discretization = {tds, physics, es, physics}
  std5 "L = 100 nm"
    param: Parametric "Parametric Sweep"
      pname = {Xa, L}
      plistarr = {"0.0,4.08,8.16,12.24,16.33,20.41,24.49,28.57,32.65,36.73,40.82,44.9,48.98,53.06,57.14,61.22,65.31,69.39,73.47,77.55,81.63,85.71,89.8,93.88,97.96,102.04,106.12,110.2,114.29,118.37,122.45,126.53,130.61,134.69,138.78,142.86,146.94,151.02,155.1,159.18,163.27,167.35,171.43,175.51,179.59,183.67,187.76,191.84,195.92,200.0", "150.0,149.888941774,149.554774495,148.994475469,148.200622265,147.169466535,145.888926497726,144.345188009,142.5202006809814,140.3904205522491,137.918420196,135.074869954,131.797531637,128.006003434,123.580041169,118.3256459847975,111.8728070534371,103.46098909,100.0,100.0,100.0,100.0,100.0,100.0,100.0,100.0,100.0,100.0,100.0,100.0,100.0,100.0,100.0,100.0,100.0,100.0,100.0,100.0,100.0,100.0,100.0,100.0,100.0,100.0,100.0,100.0,100.0,100.0,100.0,100.0"}
      punit = {nm, nm}
    stat: Stationary | discretization = {tds, physics, es, physics}
  std6 "L = 25 nm"
    param: Parametric "Parametric Sweep"
      pname = {Xa, L}
      plistarr = {"0.0,4.08,8.16,12.24,16.33,20.41,24.49,28.57,32.65,36.73,40.82,44.9,48.98,53.06,57.14,61.22,65.31,69.39,73.47,77.55,81.63,85.71,89.8,93.88,97.96,102.04,106.12,110.2,114.29,118.37,122.45,126.53,130.61,134.69,138.78,142.86,146.94,151.02,155.1,159.18,163.27,167.35,171.43,175.51,179.59,183.67,187.76,191.84,195.92,200.0", "75.0,74.8889417738,74.554774495,73.9944754694565,73.2006222651,72.1694665354,70.888926497726,69.345188009,67.520200681,65.3904205522491,62.9184201963,60.0748699541,56.7975316365,53.0060034336,48.5800411692,43.3256459848,36.8728070534,28.4609890903,25.0,25.0,25.0,25.0,25.0,25.0,25.0,25.0,25.0,25.0,25.0,25.0,25.0,25.0,25.0,25.0,25.0,25.0,25.0,25.0,25.0,25.0,25.0,25.0,25.0,25.0,25.0,25.0,25.0,25.0,25.0,25.0"}
      punit = {nm, nm}
    stat: Stationary | discretization = {tds, physics, es, physics}

Solver configurations
  sol1 "Solution 1" (study std2)
    v1: Variables "Dependent Variables 1"
    s1: Stationary "Stationary Solver 1"
      se1: Segregated
        ss1: SegregatedStep | segvar = {comp1_V}; linsolver = i1
        ss2: SegregatedStep | segvar = {comp1_cR, comp1_cP, comp1_cK, comp1_cCl}; linsolver = i2; subdamp = 0.7
      i1: Iterative | linsolver = cg
        mg1: Multigrid | prefun = amg
      i2: Iterative | nlinnormuse = on; maxlinit = 400; rhob = 40
        mg1: Multigrid
  sol5 "Solution 5" (study std3)
    // same settings as sol1
  sol8 "Parametric Solutions 3" (study std3)
  sol32 "Solution 32" (study std4)
    // same settings as sol1
  sol33 "Parametric Solutions 4" (study std4)
  sol103 "Solution 103" (study std5)
    // same settings as sol1
  sol104 "Parametric Solutions 5" (study std5)
  sol174 "Solution 174" (study std6)
    // same settings as sol1
  sol175 "Parametric Solutions 6" (study std6)

Datasets
  dset5: Solution | solution = sol32
  dset6: Solution | solution = sol33
  int3: Integral on boundaries 19, 22, 32, 36 | data = dset6
  int4: Integral on boundaries 15, 16, 23, 26, 30, 33, 37, 39 | data = dset6
  dset7: Solution | solution = sol103
  dset8: Solution | solution = sol104
  int6: Integral on boundaries 19, 22, 32, 36 | data = dset8
  int5: Integral on boundaries 15, 16, 23, 26, 30, 33, 37, 39 | data = dset8
  dset9: Solution | solution = sol174
  dset10: Solution | solution = sol175
  int7: Integral on boundaries 15, 16, 23, 26, 30, 33, 37, 39 | data = dset10
  pc1: ParCurve3D "Parameterized Curve 3D 1" | data = dset10; parmax1 = pi; exprx = Rnp*cos(s); exprz = Rnp*sin(s)+25
  edg1: Edge3D | data = dset10
  cln1: CutLine3D | data = dset10; genpoints = {{-250, 0, 25}, {-Rnp, 0, 25}}
  cpl1: CutPlane | data = dset10; quickplane = xz
  cpl2: CutPlane | data = dset6; quickplane = xz; spacevars = {cpl1x, cpl1y}; normal = {cpl1nx, cpl1ny, cpl1nz}
  dset19: Solution | solution = sol5
  dset20: Solution | solution = sol8
  cpl3: CutPlane | data = dset20; quickplane = xz; spacevars = {cpl1x, cpl1y}; normal = {cpl1nx, cpl1ny, cpl1nz}
  int12: Integral on boundaries 15, 16, 23, 26, 30, 33, 37, 39 | data = dset20
  cpt1: CutPoint3D "Cut Point 3D L = 25"
    data = dset20
    pointx = 0.0,4.08,8.16,12.24,16.33,20.41,24.49,28.57,32.65,36.73,40.82,44.9,48.98,53.06,57.14,61.22,65.31,69.39,73.47,77.55,81.63,85.71,89.8,93.88,97.96,102.04,106.12,110.2,114.29,118.37,122.45,126.53,130.61,134.69,138.78,142.86,146.94,151.02,155.1,159.18,163.27,167.35,171.43,175.51,179.59,183.67,187.76,191.84,195.92,200.0
    pointy = 0
    pointz = 75.0,74.8889417738,74.554774495,73.9944754694565,73.2006222651,72.1694665354,70.888926497726,69.345188009,67.520200681,65.3904205522491,62.9184201963,60.0748699541,56.7975316365,53.0060034336,48.5800411692,43.3256459848,36.8728070534,28.4609890903,25.0,25.0,25.0,25.0,25.0,25.0,25.0,25.0,25.0,25.0,25.0,25.0,25.0,25.0,25.0,25.0,25.0,25.0,25.0,25.0,25.0,25.0,25.0,25.0,25.0,25.0,25.0,25.0,25.0,25.0,25.0,25.0
  cpt2: CutPoint3D "Cut Point 3D L = 50"
    data = dset20
    pointx = 0.0,4.08,8.16,12.24,16.33,20.41,24.49,28.57,32.65,36.73,40.82,44.9,48.98,53.06,57.14,61.22,65.31,69.39,73.47,77.55,81.63,85.71,89.8,93.88,97.96,102.04,106.12,110.2,114.29,118.37,122.45,126.53,130.61,134.69,138.78,142.86,146.94,151.02,155.1,159.18,163.27,167.35,171.43,175.51,179.59,183.67,187.76,191.84,195.92,200.0
    pointy = 0
    pointz = 100.0,99.8889417738,99.554774495,98.9944754694565,98.2006222651,97.1694665354,95.888926497726,94.345188009,92.520200681,90.3904205522491,87.9184201963,85.0748699541,81.7975316365,78.0060034336,73.5800411692,68.3256459847975,61.8728070534,53.4609890903,50.0,50.0,50.0,50.0,50.0,50.0,50.0,50.0,50.0,50.0,50.0,50.0,50.0,50.0,50.0,50.0,50.0,50.0,50.0,50.0,50.0,50.0,50.0,50.0,50.0,50.0,50.0,50.0,50.0,50.0,50.0,50.0
    pointvar = cpt1n
  cpt3: CutPoint3D "Cut Point 3D L = 100"
    data = dset20
    pointx = 0.0,4.08,8.16,12.24,16.33,20.41,24.49,28.57,32.65,36.73,40.82,44.9,48.98,53.06,57.14,61.22,65.31,69.39,73.47,77.55,81.63,85.71,89.8,93.88,97.96,102.04,106.12,110.2,114.29,118.37,122.45,126.53,130.61,134.69,138.78,142.86,146.94,151.02,155.1,159.18,163.27,167.35,171.43,175.51,179.59,183.67,187.76,191.84,195.92,200.0
    pointy = 0
    pointz = 150.0,149.888941774,149.554774495,148.994475469,148.200622265,147.169466535,145.888926497726,144.345188009,142.5202006809814,140.3904205522491,137.918420196,135.074869954,131.797531637,128.006003434,123.580041169,118.3256459847975,111.8728070534371,103.46098909,100.0,100.0,100.0,100.0,100.0,100.0,100.0,100.0,100.0,100.0,100.0,100.0,100.0,100.0,100.0,100.0,100.0,100.0,100.0,100.0,100.0,100.0,100.0,100.0,100.0,100.0,100.0,100.0,100.0,100.0,100.0,100.0
    pointvar = cpt1n

Derived values
  pev1: EvalPoint "L = 50"
    data = int4
    table = tbl2
    expr = {kfore*cR, n*F*kfore*cR, tds.ntflux_cP/(2.4*4*D*Rbase)}
    unit = {mol/s, pA, mM}
  pev4: EvalPoint "L = 100" | data = int5; table = tbl3; expr = tds.ntflux_cP/(2.4*4*D*Rbase); unit = mM
  pev8: EvalPoint "L = 25"
    data = int7
    table = tbl8
    expr = {kback*cP, n*F*kback*cP, -(nx*cPx+ny*cPy+nz*cPz)*n*F*D, tds.ntflux_cP/(2.4*4*D*Rbase)}
    unit = {mol/s, pA, pA, mM}
  pev13: EvalPoint "L = 50 Bulk"
    data = int12
    table = tbl13
    expr = {tds.ntflux_cP/(kback*Atip), tds.ntflux_cP/(D*Atip/Rbase), tds.ntflux_cP/(2.4*4*D*Rbase), tds.ntflux_cP/(D*2*pi*Rbase)}
    unit = {mM, mM, mM, mM}
    descr = {Kinetically limited, hemispherical Mass transfer coeff Bard, Cone Zoski 2002 RG = 5, Hemisphere UME}

Tables
  tbl1: Table
    // Point Evaluation 1 (kfore*cR)
    Xa (m) | L (nm) | kfore*cR (mol/s), Integral 1 | n*F*kfore*cR (pA), Integral 1
    -2.75e-07 | 25 | 2.91414e-15 | 281.171
    -2.5e-07 | 25 | 2.95369e-15 | 284.987
    -2.25e-07 | 25 | 2.95834e-15 | 285.436
    -2e-07 | 25 | 3.00494e-15 | 289.932
    -1.75e-07 | 25 | 3.06004e-15 | 295.248
    -1.5e-07 | 25 | 3.14595e-15 | 303.537
    -1.25e-07 | 25 | 3.27566e-15 | 316.052
    -1e-07 | 25 | 3.53106e-15 | 340.695
    -7.5e-08 | 43.122 | 3.68568e-15 | 355.612
    -5e-08 | 62.8605 | 3.66207e-15 | 353.335
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  tbl2: Table
    // Point Evaluation 2 (kback*cP)
    Xa (nm) | L (nm) | kfore*cR (mol/s), Integral 4 | n*F*kfore*cR (pA), Integral 4 | tds.ntflux_cP/(2.4*4*D*Rbase) (mM), Integral 4
    0 | 100 | 1.72567e-12 | 166501 | 0.283947
    4.08 | 99.8889 | 1.72553e-12 | 166488 | 0.285182
    8.16 | 99.5548 | 1.72563e-12 | 166498 | 0.285549
    12.24 | 98.9945 | 1.72568e-12 | 166502 | 0.285953
    16.33 | 98.2006 | 1.72571e-12 | 166505 | 0.286672
    20.41 | 97.1695 | 1.72559e-12 | 166494 | 0.28785
    24.49 | 95.8889 | 1.72569e-12 | 166503 | 0.28901
    28.57 | 94.3452 | 1.72561e-12 | 166495 | 0.290116
    32.65 | 92.5202 | 1.72572e-12 | 166506 | 0.292259
    36.73 | 90.3904 | 1.72564e-12 | 166499 | 0.295424
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  tbl3: Table
    // Point Evaluation 1 (kfore*cR, n*F*kfore*cR)
    Xa (nm) | L (nm) | tds.ntflux_cP/(2.4*4*D*Rbase) (mM), Integral 6
    0 | 150 | 0.210828
    4.08 | 149.889 | 0.211098
    8.16 | 149.555 | 0.211197
    12.24 | 148.994 | 0.211685
    16.33 | 148.201 | 0.212191
    20.41 | 147.169 | 0.212882
    24.49 | 145.889 | 0.213756
    28.57 | 144.345 | 0.214886
    32.65 | 142.52 | 0.215949
    36.73 | 140.39 | 0.217429
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  tbl4: Table
    // Point Evaluation 4 (kfore*cR, n*F*kfore*cR)
    c_elec | Xa (m) | L (m) | kback*cP (mol/s), Integral 2 | n*F*kback*cP (pA), Integral 2
    0.1 | -5.5e-08 | 2.5e-08 | 4.59477e-16 | 44.3326
    0.1 | -5.5e-08 | 5e-08 | 4.04434e-16 | 39.0218
    0.1 | -5.5e-08 | 1e-07 | 3.12498e-16 | 30.1514
    0.1 | -4.27778e-08 | 2.5e-08 | 4.91997e-16 | 47.4703
    0.1 | -4.27778e-08 | 5e-08 | 4.19234e-16 | 40.4498
    0.1 | -4.27778e-08 | 1e-07 | 3.18168e-16 | 30.6984
    0.1 | -3.05556e-08 | 2.5e-08 | 5.28977e-16 | 51.0383
    0.1 | -3.05556e-08 | 5e-08 | 4.34332e-16 | 41.9066
    0.1 | -3.05556e-08 | 1e-07 | 3.22769e-16 | 31.1423
    0.1 | -1.83333e-08 | 2.5e-08 | 5.67002e-16 | 54.7072
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  tbl5: Table
    // L = 25.1 (kback*cP, n*F*kback*cP)
    Xa (m) | L (nm) | kback*cP (mol/s), Integral 2 | n*F*kback*cP (pA), Integral 2 | kback*cP (mol/s), Integral 2 | n*F*kback*cP (pA), Integral 2 | kback*cP (mol/s), Integral 2 | n*F*kback*cP (pA), Integral 2 | kback*cP (mol/s), Integral 2 | n*F*kback*cP (pA), Integral 2 | kback*cP (mol/s), Integral 2 | n*F*kback*cP (pA), Integral 2
    -2.75e-07 | 25 | 7.75251e-16 | 74.8001 | 8.63549e-15 | 833.195 | 8.52848e-15 | 822.87 | 7.62842e-15 | 736.028 | 7.62842e-15 | 736.028
    -2.5e-07 | 25 | 8.8218e-16 | 85.1171 | 8.74016e-15 | 843.295 | 8.63464e-15 | 833.113 | 7.74647e-15 | 747.418 | 7.74647e-15 | 747.418
    -2.25e-07 | 25 | 9.99606e-16 | 96.4469 | 8.81686e-15 | 850.695 | 8.71485e-15 | 840.853 | 7.84724e-15 | 757.141 | 7.84724e-15 | 757.141
    -2e-07 | 25 | 1.14019e-15 | 110.011 | 8.89961e-15 | 858.679 | 8.7994e-15 | 849.01 | 7.94626e-15 | 766.694 | 7.94626e-15 | 766.694
    -1.75e-07 | 25 | 1.30433e-15 | 125.849 | 8.95952e-15 | 864.459 | 8.86244e-15 | 855.093 | 8.03328e-15 | 775.091 | 8.03328e-15 | 775.091
    -1.5e-07 | 25 | 1.50407e-15 | 145.12 | 9.02761e-15 | 871.029 | 8.93354e-15 | 861.953 | 8.13068e-15 | 784.489 | 8.13068e-15 | 784.489
    -1.25e-07 | 25 | 1.75964e-15 | 169.779 | 9.11369e-15 | 879.334 | 9.02343e-15 | 870.625 | 8.25457e-15 | 796.443 | 8.25457e-15 | 796.443
    -1e-07 | 25 | 2.12572e-15 | 205.1 | 9.25025e-15 | 892.511 | 9.16636e-15 | 884.417 | 8.45213e-15 | 815.504 | 8.45213e-15 | 815.504
    -7.5e-08 | 43.122 | 2.30806e-15 | 222.693 | 8.5714e-15 | 827.012 | 8.51771e-15 | 821.831 | 8.02401e-15 | 774.197 | 8.02401e-15 | 774.197
    -5e-08 | 62.8605 | 2.24131e-15 | 216.252 | 7.92842e-15 | 764.974 | 7.88683e-15 | 760.961 | 7.49127e-15 | 722.795 | 7.49127e-15 | 722.795
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  tbl6: Table
    // L = 50.1 (kfore*cR, n*F*kfore*cR)
    Xa (m) | L (nm) | kback*cP (mol/s), Integral 4 | n*F*kback*cP (pA), Integral 4 | kback*cP (mol/s), Integral 4 | n*F*kback*cP (pA), Integral 4
    -2.75e-07 | 50 | 7.47187e-16 | 72.0923 | 9.38126e-17 | 9.05151
    -2.5e-07 | 50 | 8.45961e-16 | 81.6225 | 1.0312e-16 | 9.9495
    -2.25e-07 | 50 | 9.51958e-16 | 91.8497 | 1.13455e-16 | 10.9467
    -2e-07 | 50 | 1.07569e-15 | 103.788 | 1.25448e-16 | 12.1038
    -1.75e-07 | 50 | 1.21616e-15 | 117.341 | 1.393e-16 | 13.4404
    -1.5e-07 | 50 | 1.38103e-15 | 133.249 | 1.55848e-16 | 15.037
    -1.25e-07 | 50 | 1.58047e-15 | 152.492 | 1.75838e-16 | 16.9657
    -1e-07 | 50 | 1.83036e-15 | 176.603 | 2.00913e-16 | 19.3851
    -7.5e-08 | 68.122 | 1.86144e-15 | 179.601 | 2.04808e-16 | 19.7609
    -5e-08 | 87.8605 | 1.75064e-15 | 168.911 | 1.94609e-16 | 18.7768
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  tbl7: Table
    // L = 100.1 (kfore*cR, n*F*kfore*cR)
    Xa (m) | L (nm) | kback*cP (mol/s), Integral 6 | n*F*kback*cP (pA), Integral 6 | kback*cP (mol/s), Integral 6 | n*F*kback*cP (pA), Integral 6
    -2.75e-07 | 100 | 6.23182e-15 | 601.277 | 8.76911e-17 | 8.46088
    -2.5e-07 | 100 | 6.34575e-15 | 612.269 | 9.50351e-17 | 9.16946
    -2.25e-07 | 100 | 6.41808e-15 | 619.249 | 1.03152e-16 | 9.95263
    -2e-07 | 100 | 6.49402e-15 | 626.576 | 1.11837e-16 | 10.7906
    -1.75e-07 | 100 | 6.54912e-15 | 631.892 | 1.214e-16 | 11.7132
    -1.5e-07 | 100 | 6.60618e-15 | 637.397 | 1.31862e-16 | 12.7227
    -1.25e-07 | 100 | 6.66181e-15 | 642.765 | 1.4353e-16 | 13.8485
    -1e-07 | 100 | 6.70025e-15 | 646.474 | 1.54869e-16 | 14.9425
    -7.5e-08 | 118.122 | 6.36263e-15 | 613.899 | 1.5168e-16 | 14.6348
    -5e-08 | 137.861 | 6.01848e-15 | 580.693 | 1.42804e-16 | 13.7784
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  tbl8: Table
    // L = 25 kOH (kback*cP, n*F*kback*cP)
    Xa (nm) | L (nm) | kback*cP (mol/s), Integral 7 | n*F*kback*cP (pA), Integral 7 | -(nx*cPx+ny*cPy+nz*cPz)*n*F*D (pA), Integral 7 | tds.ntflux_cP/(2.4*4*D*Rbase) (mM), Integral 7
    0 | 75 | 2.55229e-16 | 24.6257 | 21.584 | 0.361719
    4.08 | 74.8889 | 2.55619e-16 | 24.6634 | 21.5065 | 0.362272
    8.16 | 74.5548 | 2.55101e-16 | 24.6134 | 21.6689 | 0.361536
    12.24 | 73.9945 | 2.56355e-16 | 24.7345 | 21.579 | 0.363315
    16.33 | 73.2006 | 2.56683e-16 | 24.7661 | 21.836 | 0.36378
    20.41 | 72.1695 | 2.57785e-16 | 24.8724 | 21.9232 | 0.365341
    24.49 | 70.8889 | 2.59147e-16 | 25.0038 | 22.0705 | 0.367272
    28.57 | 69.3452 | 2.60798e-16 | 25.1631 | 22.2903 | 0.369611
    32.65 | 67.5202 | 2.62789e-16 | 25.3552 | 22.4223 | 0.372433
    36.73 | 65.3904 | 2.65149e-16 | 25.5829 | 22.6526 | 0.375778
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  tbl9: Table
    // L = 25 kOH 1 (kback*cP, n*F*kback*cP)
    Xa (m) | L (nm) | k0H (cm/s) | kback*cP (mol/s), Integral 8 | n*F*kback*cP (pA), Integral 8
    -2.75e-07 | 25 | 0.001 | 1.57862e-15 | 152.313
    -2.5e-07 | 25 | 0.001 | 1.68975e-15 | 163.035
    -2.25e-07 | 25 | 0.001 | 1.81383e-15 | 175.008
    -2e-07 | 25 | 0.001 | 1.95682e-15 | 188.803
    -1.75e-07 | 25 | 0.001 | 2.12195e-15 | 204.736
    -1.5e-07 | 25 | 0.001 | 2.32202e-15 | 224.04
    -1.25e-07 | 25 | 0.001 | 2.58185e-15 | 249.109
    -1e-07 | 25 | 0.001 | 2.9522e-15 | 284.843
    -7.5e-08 | 43.122 | 0.001 | 3.12972e-15 | 301.971
    -5e-08 | 62.8605 | 0.001 | 3.04116e-15 | 293.427
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  tbl10: Table
    // L = 25 kOH 1.1 (kback*cP, n*F*kback*cP)
    Xa (m) | L (nm) | k0H (cm/s) | kback*cP (mol/s), Integral 9 | n*F*kback*cP (pA), Integral 9
    -2.75e-07 | 25 | 0.01 | 4.37581e-15 | 422.201
    -2.5e-07 | 25 | 0.01 | 4.51479e-15 | 435.609
    -2.25e-07 | 25 | 0.01 | 4.65389e-15 | 449.03
    -2e-07 | 25 | 0.01 | 4.79913e-15 | 463.044
    -1.75e-07 | 25 | 0.01 | 4.95438e-15 | 478.023
    -1.5e-07 | 25 | 0.01 | 5.1359e-15 | 495.537
    -1.25e-07 | 25 | 0.01 | 5.36806e-15 | 517.937
    -1e-07 | 25 | 0.01 | 5.70302e-15 | 550.256
    -7.5e-08 | 43.122 | 0.01 | 5.71051e-15 | 550.978
    -5e-08 | 62.8605 | 0.01 | 5.45329e-15 | 526.161
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  tbl11: Table
    // L = 25 kOH 1.1.1 (kback*cP, n*F*kback*cP)
    Xa (m) | L (nm) | k0H (cm/s) | kback*cP (mol/s), Integral 10 | n*F*kback*cP (pA), Integral 10
    -2.75e-07 | 25 | 0.1 | 7.60357e-15 | 733.63
    -2.5e-07 | 25 | 0.1 | 7.72122e-15 | 744.981
    -2.25e-07 | 25 | 0.1 | 7.82162e-15 | 754.669
    -2e-07 | 25 | 0.1 | 7.92018e-15 | 764.179
    -1.75e-07 | 25 | 0.1 | 8.00664e-15 | 772.521
    -1.5e-07 | 25 | 0.1 | 8.10319e-15 | 781.836
    -1.25e-07 | 25 | 0.1 | 8.22554e-15 | 793.641
    -1e-07 | 25 | 0.1 | 8.41965e-15 | 812.37
    -7.5e-08 | 43.122 | 0.1 | 7.99157e-15 | 771.066
    -5e-08 | 62.8605 | 0.1 | 7.46143e-15 | 719.916
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  tbl12: Table
    // L = 25 kOH 1.1.1.1 (kback*cP, n*F*kback*cP)
    Xa (m) | L (nm) | k0H (cm/s) | kback*cP (mol/s), Integral 11 | n*F*kback*cP (pA), Integral 11
    -2.75e-07 | 25 | 1 | 8.49736e-15 | 819.868
    -2.5e-07 | 25 | 1 | 8.6032e-15 | 830.079
    -2.25e-07 | 25 | 1 | 8.68313e-15 | 837.791
    -2e-07 | 25 | 1 | 8.76733e-15 | 845.916
    -1.75e-07 | 25 | 1 | 8.82998e-15 | 851.96
    -1.5e-07 | 25 | 1 | 8.90046e-15 | 858.761
    -1.25e-07 | 25 | 1 | 8.98916e-15 | 867.319
    -1e-07 | 25 | 1 | 9.12932e-15 | 880.842
    -7.5e-08 | 43.122 | 1 | 8.48349e-15 | 818.529
    -5e-08 | 62.8605 | 1 | 7.85609e-15 | 757.995
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  tbl13: Table
    // L = 50 Bulk (kback*cP, n*F*kback*cP, n*F*kback*cP/(n*F*k0*Atip), tds.ntflux_cP/(D*Atip/Rbase), tds.ntflux_cP/(kback*Atip), tds.ntflux_cP/(D*2.2*4*Rbase), tds.ntflux_cP/(D*2*pi*Rbase))
    Xa (m) | L (nm) | Kinetically limited (mM), Integral 12 | hemispherical Mass transfer coeff Bard (mM), Integral 12 | Cone Zoski 2002 RG = 5 (mM), Integral 12 | Hemisphere UME (mM), Integral 12
    0 | 875 | 0.000376519 | 1.02128 | 1.03682 | 1.58414

Plots
  pg31: PlotGroup1D "1D Plot Group 31" | data = none
    tblp1: Table "Table Graph 1" | table = tbl8; plotcolumninput = manual; legends = L = 25 nm
    tblp2: Table "Table Graph 2" | table = tbl6; xaxisdata = 1; plotcolumninput = manual; legends = L = 50 nm
    tblp3: Table "Table Graph 3" | table = tbl7; xaxisdata = 1; plotcolumninput = manual; legends = L = 100 nm
  pg32: PlotGroup1D "L = 25 nm" | data = none; xlabel = Distance / m; ylabel = Concentration / mM
    tblp4: Table "Table Graph 4" | table = tbl8; xaxisdata = 1; plotcolumninput = manual; legends = {L = 25 nm kOH, }
    ptgr1: PointGraph | data = cpt1; expr = cP; unit = mM; xdata = expr; xdataexpr = x; legends = (-275, 0, 25)
  pg53: PlotGroup1D "1D Plot Group 53" | data = dset5
    lngr1: LineGraph (disabled)
      data = edg1
      expr = cP
      xdata = expr
      xdataexpr = x
      legends = {cut, "2: Xa=-2.5E-7, L=25, k0H=0", "3: Xa=-2.25E-7, L=25, k0H=0", "4: Xa=-2E-7, L=25, k0H=0", "5: Xa=-1.75E-7, L=25, k0H=0", "6: Xa=-1.5E-7, L=25, k0H=0", "7: Xa=-1.25E-7, L=25, k0H=0", "8: Xa=-1E-7, L=25, k0H=0", "9: Xa=-7.5E-8, L=43.122, k0H=0", "10: Xa=-5E-8, L=62.861, k0H=0", "11: Xa=-2.5E-8, L=72.157, k0H=0", "12: Xa=0, L=75, k0H=0", "13: Xa=2.5E-8, L=72.157, k0H=0", "14: Xa=5E-8, L=62.861, k0H=0", "15: Xa=7.5E-8, L=43.122, k0H=0", "16: Xa=1E-7, L=25, k0H=0", "17: Xa=1.25E-7, L=25, k0H=0", "18: Xa=1.5E-7, L=25, k0H=0", "19: Xa=1.75E-7, L=25, k0H=0", "20: Xa=2E-7, L=25, k0H=0", "21: Xa=2.25E-7, L=25, k0H=0", "22: Xa=2.5E-7, L=25, k0H=0", "23: Xa=2.75E-7, L=25, k0H=0"}
    tblp1: Table "Table Graph 1" | table = tbl8; plotcolumninput = manual; legends = kOH = 0
    tblp2: Table "Table Graph 2" | table = tbl9; xaxisdata = 1; plotcolumninput = manual; legends = kOH = 0.001
    tblp3: Table "Table Graph 3" | table = tbl10; xaxisdata = 1; plotcolumninput = manual; legends = kOH = 0.01
    tblp4: Table "Table Graph 4" | table = tbl11; xaxisdata = 1; plotcolumninput = manual; legends = kOH = 0.1
    tblp5: Table "Table Graph 5" | table = tbl12; xaxisdata = 1; plotcolumninput = manual; legends = kOH = 1
  pg81: PlotGroup2D "2D Plot Group 81" | data = cpl1
    con1: Contour | expr = cR; contourtype = filled
  pg82: PlotGroup2D "2D Plot Group 82" | data = cpl3; title = L=50 Contour: Concentration (mM)
    con1: Contour | expr = cP; levelmethod = levels; levels = range(0,1/20,1); contourtype = filled
  pg83: PlotGroup1D "L = 50 nm" | data = none; xlabel = Distance / m; ylabel = Concentration / mM
    tblp4: Table "Table Graph 4" | table = tbl2; xaxisdata = 1; plotcolumninput = manual; legends = {L = 25 nm kOH, }
    ptgr1: PointGraph | data = cpt2; expr = cP; unit = mM; xdata = expr; xdataexpr = x; legends = (-275, 0, 25)
  pg84: PlotGroup2D "2D Plot Group 84" | data = cpl1
    con1: Contour | expr = cR; contourtype = filled
  pg85: PlotGroup1D "L = 100 nm" | data = none; xlabel = Distance / m; ylabel = Concentration / mM
    tblp4: Table "Table Graph 4" | table = tbl3; xaxisdata = 1; plotcolumninput = manual; legends = {L = 25 nm kOH, }
    ptgr1: PointGraph | data = cpt3; expr = cP; unit = mM; xdata = expr; xdataexpr = x; legends = (-275, 0, 25)

Exports
  anim1: Animation | framesel = all; frametime = 0.5; options = off; axes = on
  anim2: Animation
    giffilename = C:\Users\mirabala\Desktop\Pt_secm_50_ele_HOPG_k0H0_.gif
    framesel = all
    frametime = 0.5
    options = on
    axes = on
  plot1: Plot
  plot2: Plot | filename = M:\Research\Pt nano L = 25 nm SECM Response_b.txt
  plot3: Plot | filename = M:\Research\Pt nano L = 50 nm SECM Response_b.txt
  plot4: Plot | filename = M:\Research\Pt nano L = 100 nm SECM Response_b.txt
  tbl1: Table | table = tbl13; filename = M:\Research\Naonparticle overlay\L = 10 Bulk response.txt
  plot9: Plot "100 nm tip response" | filename = M:\Research\Naonparticle overlay\Tip Effect 100 nm.txt
  plot7: Plot "50 nm tip response" | filename = M:\Research\Naonparticle overlay\Tip Effect 50 nm.txt
  plot5: Plot "25 nm tip response" | filename = M:\Research\Naonparticle overlay\Tip Effect 25 nm.txt
  tbl2: Table "Table L = 25 nm"
    table = tbl8
    filename = M:\Research\SECM\Naonparticle overlay\Tip Effect Bruker NP 25 nm source.txt
  tbl3: Table "Table L = 50 nm"
    table = tbl2
    filename = M:\Research\SECM\Naonparticle overlay\Tip Effect Bruker NP 50 nm.txt
  tbl4: Table "Table L = 100 nm"
    table = tbl3
    filename = M:\Research\SECM\Naonparticle overlay\Tip Effect Bruker NP 100 nm.txt
  plot6: Plot "25 nm cutline"
    filename = M:\Research\SECM\Naonparticle overlay\Concentration Cutline Bruker NP 25 nm L =50 source.txt
  plot8: Plot "50 nm cutline"
    filename = M:\Research\SECM\Naonparticle overlay\Concentration Cutline Bruker NP nm L =50 source.txt
  plot10: Plot "100 nm cutline"
    filename = M:\Research\SECM\Naonparticle overlay\Concentration Cutline Bruker NP 100 nm L =50.txt