// COMSOL Multiphysics 5.4.0.388 model "Pt_secm_disk_np.mph"
// Outline of the model tree

Parameters
  a = 25 [nm]
  Atip = pi*(Rbase+a)*sqrt((Rbase-a)^2+(K-a)^2) +2*pi*a^2  // tip surface area
  c_bulk = 1 [mmol/L]  // bulk concentration
  c_elec = 0.1 [mol/L]  // electrolyte concentration
  cs = 10[mM]
  D = 8.4*10^-6 [cm^2/s]
  D1 = 8.4*10^-6 [cm^2/s]  // Diffusion Constant
  D2 = 8.4*10^-6 [cm^2/s]
  D3 = 8.4*10^-6 [cm^2/s]
  D4 = 2*10^-6 [cm^2/s]  // Electrolyte Diffusion Constant
  D5 = 2*10^-6 [cm^2/s]
  E_sub = 0.2 [V]  // Substrate applied potential
  E_tip = -0.2 [V]  // tip applied potential
  Eb = 0.1 [V]
  ec = 1.6e-19 [C]
  ep0 = 8.85E-12[F/m]
  epr = 80
  F = 96485 [C/mol]  // Faraday's Constant
  gamma = Rgas*Te/(Na*ec)  // unit conversion for "Phi"
  htins = 50*RG  // tip insulator height
  K = 215 [nm]  // tip height
  kappa = (epr*ep0*kb*Te/(2*Na*ec^2*c_elec))^(1/2)
  kb = Rgas/Na
  L = 2  // Cantilever substrate separation
  Na = 6.022e23[1/mol]
  ne = 20  // number of surface charges
  Rbase = (175/2) [nm]  // tip base radius
  Rcant = 50 [um]  // Cantilever half width
  RG = 5*Rtip  // tip insulation radius
  Rgas = 8.314 [J/(mol*K)]  // Ideal Gas Constant
  Rtip = 1  // tip radius
  Te = 298 [K]  // Temperature
  te = 15.7/(pi*Rnp*(3*Rnp))
  u1 = z1*F*D1/(Rgas*Te)
  u2 = z2*F*D2/(Rgas*Te)
  u3 = z3*F*D3/(Rgas*Te)
  u4 = z4*F*D4/(Rgas*Te)
  va = ec/(4*pi*ep0*Rtip)/gamma
  Vavg = ec/(4*pi*ep0)*(log(10/6)-log(0.1))/(10/6)
  Xa = 0  // tip x position
  Ya = 0  // tip y position
  z1 = 0  // Glucose
  z2 = -2  // G6P
  z3 = -2  // Gluconolactone
  z4 = +1  // K+ electrolyte
  z5 = -1  // Cl- electrolyte
  k1 = 10[1/nm^2/s]/Na
  k2 = 1E12[nm/s]
  kads = 1E14[nm/s]
  Ka = 1000[nm]
  Rnp = 2
  d = 5
  Da = k2*Rnp/D2
  k0 = 5e1 [cm/s]
  kfore = k0*exp(-alpha*n*f*(Etab))
  alpha = 0.5
  f = F/(Rgas*Te)
  Etaf = Ef-E0
  E0 = 0.297 [V]  // formal potential vs. RHE
  Ef = 0.5 [V]
  kback = k0*exp((1-alpha)*n*f*(Etaf))
  n = 1  // number of electrons
  Etab = Eb-E0
  kHOPG = k0H*exp(-alpha*n*f*(Etab))
  k0H = 0 [cm/s]
  H = (K)/Rbase

Geometry
  geom1 "Geometry 1" (3D, length unit nm)
    sph2: Sphere | r = Rnp*a
    wp1: WorkPlane | unite = on
      r1: Rectangle | base = center; size = {Rnp*40*a, Rnp*40*a}
      cro1: CrossSection
    wp2: WorkPlane | quickz = (L+Rtip+htins)*a; unite = on
      c1: Circle | pos = {Xa*a, Ya*a}; r = RG*a
      c2: Circle | pos = {Xa*a, Ya*a}; r = Rtip*a
    ext1: Extrude | workplane = wp2; input = wp2; distance = -htins*a
    blk1: Block | pos = {0, 0, (L+htins)*a/2}; base = center; size = {RG*a*100, RG*a*100, (L+htins)*a}
    fin: Finalize "Form Union"

Physics
  tds: DilutedSpecies "Transport of Diluted Species" on domains 1
    dependent variable cR = {cR, cP, cK, cCl}
    TransportMechanism.Convection = 0
    TransportMechanism.Migration = 1
    MassConsistentStabilization.glim_mass = (0.1[mol/m^3])/tds.helem
    AdvancedSettings.BackCompState = 0
    cdm1: ConvectionDiffusionMigration "Transport Properties 1" (default)
      z = {z1, z3, z4, z5}
      D_cR = D1
      D_cP = D3
      D_cK = D4
      D_cCl = D5
    nflx1: NoFlux (default) | IncludeConvection = 1
    init1: init "Initial Values 1" (default) | initc = {1*c_bulk, 0*c_bulk, c_elec, c_elec}
    fl1: Fluxes "Flux NP" on boundaries 15, 18, 29, 33
      species = {1, 1, 0, 0}
      N0 = {-kfore*cR, kfore*cR, 0, 0}
      kc = {-k1/c_bulk, 0, 0, 0}
      cb = {cR, 0, 0, 0}
    conc1: Concentration on boundaries 1, 2, 4, 5, 12, 24, 38
      species = {1, 1, 1, 1}
      c0 = {1*c_bulk, 0*c_bulk, c_elec, c_elec}
    fl3: Fluxes "Flux Tip" on boundaries 21
      species = {1, 1, 0, 0}
      N0 = {kback*cP, -kback*cP, 0, 0}
      kc = {kback, k2, 0, 0}
      cb = {cP, cP, 0, 0}
  es: Electrostatics on domains 1
    dependent variable V
    ccn1: ChargeConservation (default) | epsilonr_mat = userdef; epsilonr = epr; materialType = solid
    zc1: ZeroCharge (default)
    init1: init "Initial Values 1" (default)
    scd1: SpaceChargeDensity on domains 1 | rhoq = -1/(kappa^2)*ep0*epr*V
    pot1: ElectricPotential on boundaries 1, 2, 4, 5, 7, 8, 10-12, 14, 16, 17, 24, 26-28, 32, 36-38
    pot2: ElectricPotential (disabled) on no boundaries | V0 = Ef
    pot3: ElectricPotential (disabled) on boundaries 15, 18, 29, 33 | V0 = Eb

Multiphysics
  scdc1: SpaceChargeDensityCoupling (disabled) on domains 1
    SpaceChargeDensitySource_physics = tds
    SpaceChargeDensityDestination_physics = es
  pc1: PotentialCoupling on domains 1 | PotentialSource_physics = es; PotentialDestination_physics = tds

Mesh
  mesh1 "Mesh 1"
    size: MeshSizeDefault | hauto = 4
    ftet1: FreeTet "Free Tetrahedral 1" on domains 1
      dis1: Distribution on edges 20, 22, 23, 25, 26, 38, 39, 41, 47, 48, 50, 54 | numelem = 25
  mesh2 "Mesh 2"
    size: MeshSizeDefault | hmax = 1000; hmin = 125; hgrad = 1.25; hauto = 4; custom = on
    ftet1: FreeTet "Free Tetrahedral 1" on domains 1
      dis1: Distribution on edges 20, 22, 23, 25, 26, 38, 39, 41, 47, 48, 50, 54 | numelem = 25

Studies
  std3 "L = 50"
    param1: Parametric "L = 50" | pname = {Xa, L}; plistarr = {0, 50*Rtip}; punit = {, }
    stat: Stationary | discretization = {tds, physics, es, physics}
  std6 "L = 1"
    param: Parametric "Parametric Sweep"
      pname = {Xa, L}
      plistarr = {"0.0,0.16,0.33,0.49,0.65,0.82,0.98,1.14,1.31,1.47,1.63,1.8,1.96,2.12,2.29,2.45,2.61,2.78,2.94,3.1,3.27,3.43,3.59,3.76,3.92,4.08,4.24,4.41,4.57,4.73,4.9,5.06,5.22,5.39,5.55,5.71,5.88,6.04,6.2,6.37,6.53,6.69,6.86,7.02,7.18,7.35,7.51,7.67,7.84,8.0", "3.0,3.0,3.0,3.0,3.0,3.0,3.0,3.0,3.0,3.0,3.0,3.0,3.0,3.0,3.0,3.0,3.0,3.0,3.0,3.0,3.0,3.0,3.0,3.0,3.0,3.0,3.0,3.0,3.0,3.0,3.0,2.99909979741,2.98786317437,2.96160648449,2.9228884523,2.8697326012,2.79599554565,2.70833252033,2.6,2.45708613335,2.28806055758,2.0695326082,1.73511903798,1.0,1.0,1.0,1.0,1.0,1.0,1.0"}
      punit = {, }
    stat: Stationary | discretization = {tds, physics, es, physics}; mesh = {geom1, mesh1}
  std4 "L = 2"
    param: Parametric "Parametric Sweep"
      pname = {Xa, L}
      plistarr = {"0.0,0.16,0.33,0.49,0.65,0.82,0.98,1.14,1.31,1.47,1.63,1.8,1.96,2.12,2.29,2.45,2.61,2.78,2.94,3.1,3.27,3.43,3.59,3.76,3.92,4.08,4.24,4.41,4.57,4.73,4.9,5.06,5.22,5.39,5.55,5.71,5.88,6.04,6.2,6.37,6.53,6.69,6.86,7.02,7.18,7.35,7.51,7.67,7.84,8.0", "4.0,4.0,4.0,4.0,4.0,4.0,4.0,4.0,4.0,4.0,4.0,4.0,4.0,4.0,4.0,4.0,4.0,4.0,4.0,4.0,4.0,4.0,4.0,4.0,4.0,4.0,4.0,4.0,4.0,4.0,4.0,3.99909979741,3.98786317437,3.96160648449,3.9228884523,3.8697326012,3.79599554565,3.70833252033,3.6,3.45708613335,3.28806055758,3.0695326082,2.73511903798,2.0,2.0,2.0,2.0,2.0,2.0,2.0"}
      punit = {, }
    stat: Stationary | discretization = {tds, physics, es, physics}; mesh = {geom1, mesh1}
  std5 "L = 4"
    param: Parametric "Parametric Sweep"
      pname = {Xa, L}
      plistarr = {"0.0,0.16,0.33,0.49,0.65,0.82,0.98,1.14,1.31,1.47,1.63,1.8,1.96,2.12,2.29,2.45,2.61,2.78,2.94,3.1,3.27,3.43,3.59,3.76,3.92,4.08,4.24,4.41,4.57,4.73,4.9,5.06,5.22,5.39,5.55,5.71,5.88,6.04,6.2,6.37,6.53,6.69,6.86,7.02,7.18,7.35,7.51,7.67,7.84,8.0", "6.0,6.0,6.0,6.0,6.0,6.0,6.0,6.0,6.0,6.0,6.0,6.0,6.0,6.0,6.0,6.0,6.0,6.0,6.0,6.0,6.0,6.0,6.0,6.0,6.0,6.0,6.0,6.0,6.0,6.0,6.0,5.99909979741,5.98786317437,5.96160648449,5.9228884523,5.8697326012,5.79599554565,5.70833252033,5.6,5.45708613335,5.2880605575826,5.0695326082,4.73511903798,4.0,4.0,4.0,4.0,4.0,4.0,4.0"}
      punit = {, }
    stat: Stationary | discretization = {tds, physics, es, physics}; mesh = {geom1, mesh1}

Solver configurations
  sol5 "Solution 5" (study std3)
    v1: Variables "Dependent Variables 1"
    s1: Stationary "Stationary Solver 1"
      se1: Segregated
        ss1: SegregatedStep | segvar = {comp1_V}; linsolver = i1
        ss2: SegregatedStep | segvar = {comp1_cR, comp1_cP, comp1_cK, comp1_cCl}; linsolver = i2; subdamp = 0.7
      i1: Iterative | linsolver = cg
        mg1: Multigrid | prefun = amg
      i2: Iterative | nlinnormuse = on; maxlinit = 400; rhob = 40
        mg1: Multigrid
  sol8 "Parametric Solutions 3" (study std3)
  sol32 "Solution 32" (study std4)
    // same settings as sol5
  sol33 "Parametric Solutions 4" (study std4)
  sol103 "Solution 103" (study std5)
    // same settings as sol5
  sol104 "Parametric Solutions 5" (study std5)
  sol174 "Solution 174" (study std6)
    // same settings as sol5
  sol175 "Parametric Solutions 6" (study std6)

Datasets
  dset5: Solution | solution = sol32
  dset6: Solution | solution = sol33
  int4: Integral on boundaries 21 | data = dset6
  dset7: Solution | solution = sol103
  dset8: Solution | solution = sol104
  int5: Integral on boundaries 21 | data = dset8
  dset9: Solution | solution = sol174
  dset10: Solution | solution = sol175
  int7: Integral on boundaries 21 | data = dset10
  pc1: ParCurve3D "Parameterized Curve 3D 1" | data = dset10; parmax1 = pi; exprx = Rnp*cos(s); exprz = Rnp*sin(s)+25
  edg1: Edge3D | data = dset10
  cln1: CutLine3D | data = dset10; genpoints = {{-250, 0, 25}, {-Rnp, 0, 25}}
  cpl1: CutPlane | data = dset10; quickplane = xz
  cpl2: CutPlane | data = dset6; quickplane = xz; spacevars = {cpl1x, cpl1y}; normal = {cpl1nx, cpl1ny, cpl1nz}
  dset19: Solution | solution = sol5
  dset20: Solution | solution = sol8
  cpl3: CutPlane | data = dset20; quickplane = xz; spacevars = {cpl1x, cpl1y}; normal = {cpl1nx, cpl1ny, cpl1nz}
  int12: Integral | data = dset20
  cpt1: CutPoint3D "Cut Point 3D L = 1"
    data = dset20
    pointx = {0.0,0.16,0.33,0.49,0.65,0.82,0.98,1.14,1.31,1.47,1.63,1.8,1.96,2.12,2.29,2.45,2.61,2.78,2.94,3.1,3.27,3.43,3.59,3.76,3.92,4.08,4.24,4.41,4.57,4.73,4.9,5.06,5.22,5.39,5.55,5.71,5.88,6.04,6.2,6.37,6.53,6.69,6.86,7.02,7.18,7.35,7.51,7.67,7.84,8.0}*a
    pointy = 0
    pointz = {3.0,3.0,3.0,3.0,3.0,3.0,3.0,3.0,3.0,3.0,3.0,3.0,3.0,3.0,3.0,3.0,3.0,3.0,3.0,3.0,3.0,3.0,3.0,3.0,3.0,3.0,3.0,3.0,3.0,3.0,3.0,2.99909979741,2.98786317437,2.96160648449,2.9228884523,2.8697326012,2.79599554565,2.70833252033,2.6,2.45708613335,2.28806055758,2.0695326082,1.73511903798,1.0,1.0,1.0,1.0,1.0,1.0,1.0}*a
  cpt2: CutPoint3D "Cut Point 3D L = 2"
    data = dset20
    pointx = {0.0,0.16,0.33,0.49,0.65,0.82,0.98,1.14,1.31,1.47,1.63,1.8,1.96,2.12,2.29,2.45,2.61,2.78,2.94,3.1,3.27,3.43,3.59,3.76,3.92,4.08,4.24,4.41,4.57,4.73,4.9,5.06,5.22,5.39,5.55,5.71,5.88,6.04,6.2,6.37,6.53,6.69,6.86,7.02,7.18,7.35,7.51,7.67,7.84,8.0}*a
    pointy = 0
    pointz = {4.0,4.0,4.0,4.0,4.0,4.0,4.0,4.0,4.0,4.0,4.0,4.0,4.0,4.0,4.0,4.0,4.0,4.0,4.0,4.0,4.0,4.0,4.0,4.0,4.0,4.0,4.0,4.0,4.0,4.0,4.0,3.99909979741,3.98786317437,3.96160648449,3.9228884523,3.8697326012,3.79599554565,3.70833252033,3.6,3.45708613335,3.28806055758,3.0695326082,2.73511903798,2.0,2.0,2.0,2.0,2.0,2.0,2.0}*a
    pointvar = cpt1n
  cpt3: CutPoint3D "Cut Point 3D L = 4"
    data = dset20
    pointx = {0.0,0.16,0.33,0.49,0.65,0.82,0.98,1.14,1.31,1.47,1.63,1.8,1.96,2.12,2.29,2.45,2.61,2.78,2.94,3.1,3.27,3.43,3.59,3.76,3.92,4.08,4.24,4.41,4.57,4.73,4.9,5.06,5.22,5.39,5.55,5.71,5.88,6.04,6.2,6.37,6.53,6.69,6.86,7.02,7.18,7.35,7.51,7.67,7.84,8.0}*a
    pointy = 0
    pointz = {6.0,6.0,6.0,6.0,6.0,6.0,6.0,6.0,6.0,6.0,6.0,6.0,6.0,6.0,6.0,6.0,6.0,6.0,6.0,6.0,6.0,6.0,6.0,6.0,6.0,6.0,6.0,6.0,6.0,6.0,6.0,5.99909979741,5.98786317437,5.96160648449,5.9228884523,5.8697326012,5.79599554565,5.70833252033,5.6,5.45708613335,5.2880605575826,5.0695326082,4.73511903798,4.0,4.0,4.0,4.0,4.0,4.0,4.0}*a
    pointvar = cpt1n

Derived values
  pev1: EvalPoint "L = 2"
    data = int4
    table = tbl2
    expr = {tds.ntflux_cP/(4*D*Rtip*a), tds.ntflux_cP}
    unit = {mM, mol/s}
    descr = {Concentration, TotalFlux}
  pev4: EvalPoint "L = 4"
    data = int5
    table = tbl3
    expr = {tds.ntflux_cP/(4*D*Rtip*a), tds.ntflux_cP}
    unit = {mM, mol/s}
    descr = {Concentration, TotalFlux}
  pev8: EvalPoint "L = 1"
    data = int7
    table = tbl1
    expr = {tds.ntflux_cP/(4*D*Rtip*a), tds.ntflux_cP}
    unit = {mM, mol/s}
    descr = {Concentration, TotalFlux}
  pev13: EvalPoint "L = 50 Bulk"
    data = int12
    expr = {tds.ntflux_cP/(kback*Atip), tds.ntflux_cP/(D*Atip/Rbase), tds.ntflux_cP/(2.4*4*D*Rbase), tds.ntflux_cP/(D*2*pi*Rbase)}
    unit = {mM, mM, mM, mM}
    descr = {Kinetically limited, hemispherical Mass transfer coeff Bard, Cone Zoski 2002 RG = 5, Hemisphere UME}

Tables
  tbl1: Table
    // L = 1 (tds.ntflux_cP/(4*D*Rtip*a), tds.ntflux_cP)
    Xa | L | Concentration (mM), Integral 7 | TotalFlux (mol/s), Integral 7
    0 | 3 | 0.862989 | 7.2491e-17
    0.16 | 3 | 0.861056 | 7.23287e-17
    0.33 | 3 | 0.858108 | 7.20811e-17
    0.49 | 3 | 0.851914 | 7.15608e-17
    0.65 | 3 | 0.84579 | 7.10464e-17
    0.82 | 3 | 0.836218 | 7.02423e-17
    0.98 | 3 | 0.825885 | 6.93744e-17
    1.14 | 3 | 0.814237 | 6.83959e-17
    1.31 | 3 | 0.800006 | 6.72005e-17
    1.47 | 3 | 0.785818 | 6.60087e-17
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  tbl2: Table
    // L = 2 (tds.ntflux_cP/(4*D*Rtip*a), tds.ntflux_cP)
    Xa | L | Concentration (mM), Integral 4 | TotalFlux (mol/s), Integral 4
    0 | 4 | 0.649027 | 5.45183e-17
    0.16 | 4 | 0.648746 | 5.44946e-17
    0.33 | 4 | 0.647217 | 5.43662e-17
    0.49 | 4 | 0.644776 | 5.41612e-17
    0.65 | 4 | 0.641476 | 5.3884e-17
    0.82 | 4 | 0.636819 | 5.34928e-17
    0.98 | 4 | 0.631817 | 5.30726e-17
    1.14 | 4 | 0.62597 | 5.25814e-17
    1.31 | 4 | 0.619786 | 5.2062e-17
    1.47 | 4 | 0.612359 | 5.14382e-17
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  tbl3: Table
    // L = 4 (tds.ntflux_cP/(4*D*Rtip*a), tds.ntflux_cP)
    Xa | L | Concentration (mM), Integral 6 | TotalFlux (mol/s), Integral 6
    0 | 6 | 0.42773 | 3.59293e-17
    0.16 | 6 | 0.42758 | 3.59167e-17
    0.33 | 6 | 0.427791 | 3.59344e-17
    0.49 | 6 | 0.426656 | 3.58391e-17
    0.65 | 6 | 0.425241 | 3.57203e-17
    0.82 | 6 | 0.423963 | 3.56129e-17
    0.98 | 6 | 0.422626 | 3.55006e-17
    1.14 | 6 | 0.420485 | 3.53207e-17
    1.31 | 6 | 0.418076 | 3.51184e-17
    1.47 | 6 | 0.415701 | 3.49189e-17
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
Plots
  pg32: PlotGroup1D "L = 1" | data = none; xlabel = Distance / m; ylabel = Concentration / mM
    ptgr1: PointGraph | data = cpt1; expr = cP; unit = mM; xdata = expr; xdataexpr = x/a; legends = (-275, 0, 25)
    tblp1: Table "Table Graph 1" | table = tbl1; xaxisdata = 1; plotcolumninput = manual
  pg53: PlotGroup1D "1D Plot Group 53" | data = dset5
    lngr1: LineGraph (disabled)
      data = edg1
      expr = cP
      xdata = expr
      xdataexpr = x
      legends = {cut, "2: Xa=-2.5E-7, L=25, k0H=0", "3: Xa=-2.25E-7, L=25, k0H=0", "4: Xa=-2E-7, L=25, k0H=0", "5: Xa=-1.75E-7, L=25, k0H=0", "6: Xa=-1.5E-7, L=25, k0H=0", "7: Xa=-1.25E-7, L=25, k0H=0", "8: Xa=-1E-7, L=25, k0H=0", "9: Xa=-7.5E-8, L=43.122, k0H=0", "10: Xa=-5E-8, L=62.861, k0H=0", "11: Xa=-2.5E-8, L=72.157, k0H=0", "12: Xa=0, L=75, k0H=0", "13: Xa=2.5E-8, L=72.157, k0H=0", "14: Xa=5E-8, L=62.861, k0H=0", "15: Xa=7.5E-8, L=43.122, k0H=0", "16: Xa=1E-7, L=25, k0H=0", "17: Xa=1.25E-7, L=25, k0H=0", "18: Xa=1.5E-7, L=25, k0H=0", "19: Xa=1.75E-7, L=25, k0H=0", "20: Xa=2E-7, L=25, k0H=0", "21: Xa=2.25E-7, L=25, k0H=0", "22: Xa=2.5E-7, L=25, k0H=0", "23: Xa=2.75E-7, L=25, k0H=0"}
  pg81: PlotGroup2D "2D Plot Group 81" | data = cpl1
    con1: Contour | expr = cR; contourtype = filled
  pg82: PlotGroup2D "2D Plot Group 82" | data = cpl3; title = L=50 Contour: Concentration (mM)
    con1: Contour | expr = cP; levelmethod = levels; levels = range(0,1/20,1); contourtype = filled
  pg83: PlotGroup1D "L = 2" | data = none; xlabel = Distance / m; ylabel = Concentration / mM
    ptgr1: PointGraph | data = cpt2; expr = cP; unit = mM; xdata = expr; xdataexpr = x/a; legends = (-275, 0, 25)
    tblp1: Table "Table Graph 1" | table = tbl2; xaxisdata = 1; plotcolumninput = manual
  pg84: PlotGroup2D "2D Plot Group 84" | data = cpl1
    con1: Contour | expr = cR; contourtype = filled
  pg85: PlotGroup1D "L = 4" | data = none; xlabel = Distance / m; ylabel = Concentration / mM
    ptgr1: PointGraph | data = cpt3; expr = cP; unit = mM; xdata = expr; xdataexpr = x/a; legends = (-275, 0, 25)
    tblp1: Table "Table Graph 1" | table = tbl3; xaxisdata = 1; plotcolumninput = manual
  pg86: PlotGroup3D "Concentration (tds)" | data = dset9
    slc1: Slice | expr = cR
  pg87: PlotGroup3D "Concentration (tds) 1" | data = dset9
    surf1: Surface | expr = cR
  pg88: PlotGroup3D "Electric Potential (es)" | data = dset9
    mslc1: Multislice | expr = V; unit = V; descr = Electric potential

Exports
  plot6: Plot "L = 1 cutline" | filename = M:\Research\SECM\Naonparticle overlay\Concentration Cutline Disk NP 1 L =50.txt
  plot8: Plot "L = 2 cutline" | filename = M:\Research\SECM\Naonparticle overlay\Concentration Cutline Disk NP 2 L =50.txt
  plot10: Plot "L = 4 cutline"
    filename = M:\Research\SECM\Naonparticle overlay\Concentration Cutline Disk NP 4 L =50.txt
  tbl1: Table | table = tbl1; filename = M:\Research\SECM\Naonparticle overlay\Tip Effect Disk NP L=1.txt
  tbl2: Table | table = tbl2; filename = M:\Research\SECM\Naonparticle overlay\Tip Effect Disk NP L=2.txt
  tbl3: Table | table = tbl1; filename = M:\Research\SECM\Naonparticle overlay\Tip Effect Disk NP L=4.txt